// COMSOL Multiphysics 5.5.0.292 model "Straight_Wg_Example.mph"
// Outline of the model tree

Parameters
  bottom_width = core_width*3
  bottom_height = max(core_height*5,core_width)
  core_width = 12.0000[um]
  core_height = 2.0000[um]
  clad_width = core_width*3
  clad_height = max(core_height*5,core_width)
  ida = 532.000[nm]
  mesh_size = 50[nm]
  initial_guess = 1.49842

Variables
  var1 "Variables 1"
    ez = core(ewfd.Ey^2)/core(abs(ewfd.Ey))^2*core(1)

Couplings
  intop1: Integration on domains 5 | opname = core

Geometry
  geom1 "Geometry 1" (2D, length unit m)
    r1: Rectangle "Core" | base = center; size = {core_width, core_height}
    r2: Rectangle "Bottom"
      pos = {0, -0.5*(bottom_height+core_height)}
      base = center
      size = {bottom_width, bottom_height}
    r3: Rectangle "TopClad"
      pos = {0, 0.5*(clad_height+core_height-core_height)}
      base = center
      size = {clad_width, clad_height+core_height}
    r4: Rectangle "Selective_Meshing" | base = center; size = {core_width*1.5, core_height*3}
    fin: Finalize "Form Union"

Materials
  mat1: Common "Air" (disabled) on all domains
    RefractiveIndex
      n = 1
      ki = 0
  mat4: Common "PECVD" on all domains
    RefractiveIndex
      n = pecvd(c_const/freq)
      ki = 0
      int1: Interpolation
        funcname = pecvd
        table = 
          {3.16513E-07, 1.483005}
          {3.18104E-07, 1.482717}
          {3.19695E-07, 1.482432}
          {3.21287E-07, 1.482149}
          {3.22878E-07, 1.481868}
          {3.24469E-07, 1.48159}
          {3.26061E-07, 1.481313}
          {3.27652E-07, 1.481039}
          {3.29244E-07, 1.480768}
          {3.30835E-07, 1.480498}
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        interp = piecewisecubic
        argunit = m
        fununit = 1
  mat2: Common "THOX" on domains 1, 3
    RefractiveIndex
      n = thox(c_const/freq)
      ki = 0
      int1: Interpolation
        funcname = thox
        table = 
          {191.078323, 1.573367}
          {192.662064, 1.570898}
          {194.245926, 1.568502}
          {195.82991, 1.566176}
          {197.414017, 1.563918}
          {198.998245, 1.561724}
          {200.582596, 1.559593}
          {202.167068, 1.557522}
          {203.751648, 1.555508}
          {205.336349, 1.553551}
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        interp = piecewisecubic
        argunit = nm
        fununit = 1
  mat3: Common "2% Long Anneal" on domains 5
    RefractiveIndex
      n = long_anneal_2(c_const/freq)
      ki = 0
      int1: Interpolation
        funcname = long_anneal_2
        table = 
          {500.000000000, 1.500594110}
          {500.500000000, 1.500558315}
          {501.000000000, 1.500522580}
          {501.500000000, 1.500486904}
          {502.000000000, 1.500451288}
          {502.500000000, 1.500415731}
          {503.000000000, 1.500380233}
          {503.500000000, 1.500344795}
          {504.000000000, 1.500309415}
          {504.500000000, 1.500274095}
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        interp = piecewisecubic
        argunit = nm
        fununit = 1

Physics
  ewfd: ElectromagneticWavesFrequencyDomain on all domains
    dependent variable E = {Ex, Ey, Ez}
    wee1: WaveEquationElectric (default) | DisplacementFieldModel = RefractiveIndex
    pec1: PerfectElectricConductor (default)
    init1: init "Initial Values 1" (default)
    sctr1: Scattering "Scattering Boundary Condition 1" (disabled) on boundaries 1-3, 5, 19, 20 | IncidentField = EField
      rpnt1: ReferencePoint on all points

Mesh
  mesh1 "Mesh 1"
    size: MeshSizeDefault | hmax = mesh_size; custom = on
    ftri1: FreeTri "Core" on domains 5
      size1: Size on domains 5 | hmax = mesh_size; custom = on
    ftri2: FreeTri "Fine" on domains 3, 4
      size1: Size "Surrounding" on domains 3, 4 | hmax = 2*mesh_size; custom = on
    ftri3: FreeTri "Gross" on remaining entities
      size1: Size "Surrounding" on domains 1, 2 | hmax = 5*mesh_size; custom = on

Studies
  std1 "Study 1"
    mode: ModeAnalysis | transform = effective_mode_index; modeFreq = c_const/ida; neigs = 5; shift = initial_guess

Plots
  pg1: PlotGroup2D "Electric Field (ewfd)" | data = none
    surf1: Surface | expr = ewfd.Ey
    arws1: ArrowSurface | expr = {abs(ewfd.Ex), abs(ewfd.Ey)}